*HEADING

*NODE
       1,                       0.,                       0.,        6.659319448712458
       2,                   0.5336,                       0.,        6.659319448712458
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**
** SOLID ELEMENTS
**
*ELEMENT, TYPE=C3D8, ELSET=sample1
       1,        1,        2,       28,       27,      677,      678,      704,      703
       2,        2,        3,       29,       28,      678,      679,      705,      704
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*ELEMENT, TYPE=C3D8, ELSET=sample2
    2501,     3381,     3407,     3408,     3382,     4057,     4083,     4084,     4058
    2502,     3382,     3408,     3409,     3383,     4058,     4084,     4085,     4059
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**
**
**
**
**
**
**
** SECTION DATA
**
*SOLID SECTION, ELSET=sample1, MATERIAL=sample1_mat
*SOLID SECTION, ELSET=sample2, MATERIAL=sample2_mat
**
** MATERIALS
**
**
**sample1_mat
**
*MATERIAL, NAME=sample1_mat
*DENSITY
                7.85e-9,
*ELASTIC, TYPE=ISOTROPIC
                   10e10,                      0.3
**
**sample2_mat
**
*MATERIAL, NAME=sample2_mat
*DENSITY
                7.85e-9,
*ELASTIC, TYPE=ISOTROPIC
                   10489.51,                      0.3
**
**
**
**
** SURFACE DEFINITIONS
**
*SURFACE, NAME=sample1_roughFacets, TYPE=ELEMENT
       1, S1
       2, S1
       3, S1
       4, S1
       5, S1
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     625, S1
*SURFACE, NAME=sample2_roughFacets, TYPE=ELEMENT
    2501, S1
    2502, S1
    2503, S1
    2504, S1
    2505, S1
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    3125, S1
**
** SETS
**
*NSET, NSET=sample1_rough
       1,        2,        3,        4,        5,        6
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*NSET, NSET=sample1_smooth
    2705,     2706,     2707,     2708,     2709,     2710
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*NSET, NSET=sample1_Ymin
       1,        2,        3,        4,        5,        6
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*NSET, NSET=sample1_Ymax
     651,      652,      653,      654,      655,      656
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*NSET, NSET=sample1_Xmin
       1,       27,       53,       79,      105,      131
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*NSET, NSET=sample1_Xmax
      26,       52,       78,      104,      130,      156
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*NSET, NSET=sample2_rough
    3381,     3382,     3383,     3384,     3385,     3386
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*NSET, NSET=sample2_smooth
    6085,     6086,     6087,     6088,     6089,     6090
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*NSET, NSET=sample2_Ymin
    3381,     3382,     3383,     3384,     3385,     3386
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*NSET, NSET=sample2_Ymax
    4031,     4032,     4033,     4034,     4035,     4036
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*NSET, NSET=sample2_Xmin
    3381,     3407,     3433,     3459,     3485,     3511
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*NSET, NSET=sample2_Xmax
    3406,     3432,     3458,     3484,     3510,     3536
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** ------------------------------------------------------------------------
** SURFACE INTERACTIONS
**
*SURFACE INTERACTION, NAME=SURF_INTERACTION
1.,
*FRICTION
0.0,
*Surface Behavior, pressure-overclosure=HARD
**
** CONTACT and TIE DEFINITIONS
**
*CONTACT PAIR, INTERACTION=SURF_INTERACTION, TYPE=SURFACE TO SURFACE
sample1_roughFacets, sample2_roughFacets
** ------------------------------------------------------------------------
**
** BOUNDARY CONDITIONS
**
** for bottom volume **
*Boundary
sample2_smooth, ENCASTRE
*Boundary
sample2_Xmin, 1, 1
*Boundary
sample2_Xmax, 1, 1
*Boundary
sample2_Ymin, 2, 2
*Boundary
sample2_Ymax, 2, 2
** for top volume **
*Boundary
sample1_Xmin, 1, 1
*Boundary
sample1_Xmax, 1, 1
*Boundary
sample1_Ymin, 2, 2
*Boundary
sample1_Ymax, 2, 2
**
** ----------------------------------------------------------------
**
** STEP: load
**
*Step, name=load, nlgeom=NO
*Dynamic,application=QUASI-STATIC,initial=NO
0.1,  1., 1e-6, 0.1
**
** BOUNDARY CONDITIONS
**
** Name: Disp-BC-load Type: Displacement/Rotation
*Boundary
sample1_smooth, 3, 3, -3
**
** OUTPUT REQUESTS
**
*Restart, write, frequency=0
**
** FIELD OUTPUT: F-Output-1
**
*Output, field, variable=PRESELECT
*Output, history, variable=PRESELECT
**
** HISTORY OUTPUT: contact stresses
**
*Output, history, frequency=1
*Contact Output, surface=sample1_roughFacets
CPRESS, CAREA
**
** HISTORY OUTPUT - clearance
**
*Output, history, frequency=1
*Node Output, nset=sample2_rough
U3
*Node Output, nset=sample2_smooth
RF1,RF2,RF3
*End Step
